# Subscripts 2 kinds
# Suppose we have a water treatment plant with a flow of 20 L/s and a the flocculator is 2m deep, 3 m long, and 2 m wide. What is the hydraulic residence time?
# Redefinition of a constant (Don't do this!).
# Create a graph using a range variable. Head loss as a function of velocity through a valve.
# units
# How many cubic meters per day given flow of 5 L/s?
Q_Plant := 5*L/s
Q_Plant = 432 m^3/day
# Subscripts
Array_example[4] := 5
Array_example = [0; 0; 0; 0; 5]
# g is defined!
# variable solve for diameter
A_Circle == π/4*D^2
[2*sqrt(A_Circle)/sqrt(π); -2*sqrt(A_Circle)/sqrt(π)]
# Define a new unit! (ng)
ng := 10^-12*kg
ng = 1e-6 mgm
1 kg = 1000000000000 ng
# (show gram vs g)
Massrate := 5*gm/s
Massinoneday := Massrate*1*day = 432 kg
# redefinition of a constant
N_Plates := 10  # Number of plates in a plate settler module
s_total := s*N_Plates = 10 s  # Total width of the module
# Define a plant flow rate
Q_Plant := 6*L/s
# How many cubic meters per day?
Ti := 1 day
Vol := Q_Plant*Ti = 518.4 m^3
# Create a graph using a range with head loss as a function of flow rate. Define a range of velocities from 0 to 100 cm/s
V_Pipe := 0*cm/s, 10*cm/s .. 100*cm/s
K_Minor := 2
V_Pipe = [0; 0.1; 0.2; 0.3; 0.4; 0.5; 0.6; 0.7; 0.8; 0.9; 1] m/s
Headloss(V_Pipe) := K_Minor*V_Pipe^2/(2*g)
# Create the graph!
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# subscripts
V_5 := 25
V = 1 V
Array[5] := 26
Array = [0; 0; 0; 0; 0; 26]
# redefinition of a constant
Vel := 5*m/s
Distance := Vel*5*day = 2160000 m
# Create a graph using a range
s := 5 cm
